// COMSOL Multiphysics 5.0.1.276 model "2D-Cloak.mph"
// 2D Cloak
// Outline of the model tree

Parameters
  R0 = 0.25[in]  // Inner radius of superconductor.
  R1 = 0.5[in]  // Outer radius of superconductor and inner radius of ferromagnet.
  R2 = 0.75[in]  // Outer radius of ferromagnet.
  mu_SC = 0  // Relative permiability of superconductor.
  mu_FM = (R2^2+R1^2)/(R2^2-R1^2)  // Relative permiability of ferromagnet.
  Rworld = 12[in]  // Radius of world area.
  Bext = 0[T]  // External/backgroud magnetic flux density.

Selections
  sel1: Explicit "Infinite Element Domain" on domains 1
  com1: Complement "Analysis Domain" | input = {sel1}

Coordinate systems
  ie1: InfiniteElement "Infinite Element Domain 1" on domains 1 | ScalingType = Cylindrical

Geometry
  geom1 "Geometry 1" (2D, length unit mm)
    c1: Circle | r = R0
    c2: Circle | r = R1
    c3: Circle | r = R2
    pt1: Point
    c4: Circle | r = Rworld
    c5: Circle | r = 2*Rworld
    fin: Finalize "Form Union"

Materials
  mat1: Common "Air" on all domains
    def "Basic"
      relpermeability = 1
      relpermittivity = 1
      dynamicviscosity = eta(T[1/K])[Pa*s]
      ratioofspecificheat = 1.4
      electricconductivity = 0[S/m]
      heatcapacity = Cp(T[1/K])[J/(kg*K)]
      density = rho(pA[1/Pa],T[1/K])[kg/m^3]
      thermalconductivity = k(T[1/K])[W/(m*K)]
      soundspeed = cs(T[1/K])[m/s]
      eta: Piecewise | arg = T; extrap = constant; pieces = {200.0, 1600.0, -8.38278E-7+8.35717342E-8*T^1-7.69429583E-11*T^2+4.6437266E-14*T^3-1.06585607E-17*T^4}
      Cp: Piecewise | arg = T; extrap = constant; pieces = {200.0, 1600.0, 1047.63657-0.372589265*T^1+9.45304214E-4*T^2-6.02409443E-7*T^3+1.2858961E-10*T^4}
      rho: Analytic | expr = pA*0.02897/8.314/T; args = {pA, T}; dermethod = manual; argders = {{pA, d(pA*0.02897/8.314/T,pA)}, {T, d(pA*0.02897/8.314/T,T)}}
      k: Piecewise | arg = T; extrap = constant; pieces = {200.0, 1600.0, -0.00227583562+1.15480022E-4*T^1-7.90252856E-8*T^2+4.11702505E-11*T^3-7.43864331E-15*T^4}
      cs: Analytic | expr = sqrt(1.4*287*T); args = T; dermethod = manual; argders = {T, d(sqrt(1.4*287*T),T)}
    RefractiveIndex
      n = 1
      ki = 0
  mat2: Common "Superconductor (from Copper)" on domains 4
    def "Basic"
      relpermeability = mu_SC
      electricconductivity = 5.998e7[S/m]
      heatcapacity = 385[J/(kg*K)]
      relpermittivity = 1
      emissivity = 0.5
      density = 8700[kg/m^3]
      thermalconductivity = 400[W/(m*K)]
    linzRes "Linearized resistivity"
      rho0 = 1.72e-8[ohm*m]
      alpha = 3.9e-3[1/K]
      Tref = 273.15[K]
  mat3: Common "Ferromagnet (from Iron)" on domains 3
    def "Basic"
      relpermeability = mu_FM
      electricconductivity = 1.12e7[S/m]
      thermalexpansioncoefficient = 12.2e-6[1/K]
      heatcapacity = 440[J/(kg*K)]
      relpermittivity = 1
      density = 7870[kg/m^3]
      thermalconductivity = 76.2[W/(m*K)]
    Enu "Young's modulus and Poisson's ratio"
      youngsmodulus = 200e9[Pa]
      poissonsratio = 0.29

Physics
  mfnc: MagnetostaticsNoCurrents "Magnetic Fields, No Currents" on all domains
    dependent variable Vm
    BackgroundField.SolveFor = ReducedField
    BackgroundField.Hb = {0, Bext/mu0_const, 0}
    mfc1: MagneticFluxConservation (default)
    mi1: MagneticInsulation (default)
    init1: init "Initial Values 1" (default)
    zsp1: ZeroMagneticScalarPotential on points 11

Mesh
  mesh1 "Mesh 1" (physics-controlled)
    size: MeshSizeDefault | hauto = 5

Studies
  std1 "Study 1"
    stat: Stationary

Solver configurations
  sol1 "Solution 1" (study std1)
    v1: Variables "Dependent Variables 1"
    s1: Stationary "Stationary Solver 1"
      dDef: Direct
      fc1: FullyCoupled | linsolver = dDef
      prob1: SolverProblem "Information 1"
        error1: SolverError "Error 1"

Datasets
  dset1: Solution | solution = sol1

Plots
  pg1: PlotGroup2D "Magnetic Flux Density Norm (mfnc)" | data = dset1
    surf1: Surface | expr = mfnc.normB